Mon 06/20/2022
09:05 AM
$PROBLEM    2 compartment fitting
$INPUT       ID TIME AMT DV WTKG GENDER AGE DROP
$DATA      ..\..\datalarge.csv IGNORE=@

$SUBROUTINE ADVAN2 ;; advan2
$PK
  CWTKGONE = WTKG/70  ;; CENTERED ON ONE
  CWTKGZERO = WTKG-70  ;; CENTERED ON ZERO
  CAGE = AGE/40
;; thetas out of sequence
  TVV2=THETA(2) *CWTKGONE**THETA(4)
  V2=TVV2*EXP(ETA(2))
  TVCL= THETA(1) *EXP(CWTKGZERO*THETA(5))
  CL=TVCL*EXP(ETA(1))
  K=CL/V2
  ;; thetas out of sequence here
  ;; PK 1 compartment
   ALAG1=THETA(6)
;; No D1 ; include D1 and lag, with diag or block OMEGA

  TVKA=THETA(3)
  KA=TVKA
  S2 	= V2/1000
$ERROR
 REP = IREP
 IPRED =F
 IOBS = F *EXP(EPS(1))+EPS(2)
 Y=IOBS
$THETA  ;; must be one THETA per line.
 (0.001,100)	; THETA(1) CL UNITS =  L/HR
 (0.001,500) 	; THETA(2) V  UNITS = L
 (0.001,2) 	; THETA(3) KA UNITS = 1/HR
;; test for comments in blocks
;; test for comments in blocks

 ;; THETA 1 compartment  ;; comment
    ;;; comment ;; comment
   (-4,0.1,4) 	; THETA(4) POWER volume ~SEX    ;;; comment ;; comment
;; test for comments in blocks
   (-1,0.01,4) 	; THETA(5) EXPONENTIAL clearance~WT

   (0.001,0.3) 	; ALAG1 THETA(6)
$OMEGA   ;; must be one ETA/line
  0.2  		; ETA(1) CLEARANCE
$OMEGA
;; test for comments in blocks
  0.2 	; ETA(2) VOLUME
;; optional $OMEGA blocks

;; test for comments in blocks


$SIGMA
;; test for comments in blocks

  0.3 	; EPS(1) proportional error
  0.3 	; EPS(2) additive error
$EST METHOD=COND INTER MAX = 9999 MSFO=MSF1
$COV UNCOND PRINT=E

 ;; Phenotype
 ;; OrderedDict([('ADVAN', 0), ('K23~WT', 1), ('KAETA', 0), ('V2~WT', 0), ('V2~GENDER', 1), ('CL~WT', 2), ('CL~AGE', 0), ('ETAD1LAG', 0), ('D1LAG', 0), ('RESERR', 0)])
;; Genotype
 ;; [0, 1, 0, 0, 1, 2, 0, 0, 0, 0]
;; Num non-influential tokens = [False, True, False, False, False, False, False, False, False, False]

NM-TRAN MESSAGES
 WARNINGS AND ERRORS (IF ANY) FOR PROBLEM    1
 (WARNING  2) NM-TRAN INFERS THAT THE DATA ARE POPULATION.

1NONLINEAR MIXED EFFECTS MODEL PROGRAM (NONMEM) VERSION 7.4.1
 ORIGINALLY DEVELOPED BY STUART BEAL, LEWIS SHEINER, AND ALISON BOECKMANN
 CURRENT DEVELOPERS ARE ROBERT BAUER, ICON DEVELOPMENT SOLUTIONS,
 AND ALISON BOECKMANN. IMPLEMENTATION, EFFICIENCY, AND STANDARDIZATION
 PERFORMED BY NOUS INFOSYSTEMS.
 PROBLEM NO.:         1
 2 compartment fitting
 TOT. NO. OF OBS RECS:      450
 TOT. NO. OF INDIVIDUALS:       50
 ONE COMPARTMENT MODEL WITH FIRST-ORDER ABSORPTION (ADVAN2)
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 #TBLN:      1
 #METH: First Order Conditional Estimation with Interaction
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
 #TERM:
0MINIMIZATION SUCCESSFUL
 NO. OF FUNCTION EVALUATIONS USED:      334
 NO. OF SIG. DIGITS IN FINAL EST.:  3.1

 ETABAR IS THE ARITHMETIC MEAN OF THE ETA-ESTIMATES,
 AND THE P-VALUE IS GIVEN FOR THE NULL HYPOTHESIS THAT THE TRUE MEAN IS 0.

 ETABAR:        -8.9146E-04 -2.2765E-03
 SE:             2.7680E-02  2.4699E-02
 N:                      50          50

 P VAL.:         9.7431E-01  9.2656E-01

 ETASHRINKSD(%)  7.0035E+00  1.3227E+01
 ETASHRINKVR(%)  1.3516E+01  2.4704E+01
 EBVSHRINKSD(%)  7.7393E+00  1.3565E+01
 EBVSHRINKVR(%)  1.4880E+01  2.5290E+01
 EPSSHRINKSD(%)  7.7580E+00  7.7580E+00
 EPSSHRINKVR(%)  1.4914E+01  1.4914E+01


 TOTAL DATA POINTS NORMALLY DISTRIBUTED (N):          450
 N*LOG(2PI) CONSTANT TO OBJECTIVE FUNCTION:    827.044679884205
 OBJECTIVE FUNCTION VALUE WITHOUT CONSTANT:    4725.97177182142
 OBJECTIVE FUNCTION VALUE WITH CONSTANT:       5553.01645170563
 REPORTED OBJECTIVE FUNCTION DOES NOT CONTAIN CONSTANT

 TOTAL EFFECTIVE ETAS (NIND*NETA):                           100


 #TERE:
 Elapsed estimation  time in seconds:     1.39
 Elapsed covariance  time in seconds:     1.79
 Elapsed postprocess time in seconds:     0.00

 ********************               FIRST ORDER CONDITIONAL ESTIMATION WITH INTERACTION              ********************
 #OBJT:**************                       MINIMUM VALUE OF OBJECTIVE FUNCTION                      ********************
 #OBJV:********************************************     4725.972       **************************************************

 ********************               FIRST ORDER CONDITIONAL ESTIMATION WITH INTERACTION              ********************
 ********************                             FINAL PARAMETER ESTIMATE                           ********************

 THETA - VECTOR OF FIXED EFFECTS PARAMETERS   *********
         TH 1      TH 2      TH 3      TH 4      TH 5      TH 6
         1.00E+02  5.78E+02  3.52E+00  8.58E-01  1.04E-02  3.61E-01

 OMEGA - COV MATRIX FOR RANDOM EFFECTS - ETAS  ********
         ETA1      ETA2
 ETA1
+        4.52E-02
 ETA2
+        0.00E+00  4.13E-02

 SIGMA - COV MATRIX FOR RANDOM EFFECTS - EPSILONS  ****
         EPS1      EPS2
 EPS1
+        9.83E-02
 EPS2
+        0.00E+00  1.47E-01

 OMEGA - CORR MATRIX FOR RANDOM EFFECTS - ETAS  *******
         ETA1      ETA2
 ETA1
+        2.13E-01
 ETA2
+        0.00E+00  2.03E-01

 SIGMA - CORR MATRIX FOR RANDOM EFFECTS - EPSILONS  ***
         EPS1      EPS2
 EPS1
+        3.14E-01
 EPS2
+        0.00E+00  3.84E-01

 ********************               FIRST ORDER CONDITIONAL ESTIMATION WITH INTERACTION              ********************
 ********************                            STANDARD ERROR OF ESTIMATE                          ********************

 THETA - VECTOR OF FIXED EFFECTS PARAMETERS   *********
         TH 1      TH 2      TH 3      TH 4      TH 5      TH 6
         3.42E+00  2.08E+01  6.36E-01  3.12E-01  3.73E-03  2.60E-02

 OMEGA - COV MATRIX FOR RANDOM EFFECTS - ETAS  ********
         ETA1      ETA2
 ETA1
+        1.11E-02
 ETA2
+       .........  8.90E-03

 SIGMA - COV MATRIX FOR RANDOM EFFECTS - EPSILONS  ****
         EPS1      EPS2
 EPS1
+        7.35E-03
 EPS2
+       .........  1.24E-01

 OMEGA - CORR MATRIX FOR RANDOM EFFECTS - ETAS  *******
         ETA1      ETA2
 ETA1
+        2.60E-02
 ETA2
+       .........  2.19E-02

 SIGMA - CORR MATRIX FOR RANDOM EFFECTS - EPSILONS  ***
         EPS1      EPS2
 EPS1
+        1.17E-02
 EPS2
+       .........  1.62E-01

 ********************               FIRST ORDER CONDITIONAL ESTIMATION WITH INTERACTION              ********************
 ********************                          COVARIANCE MATRIX OF ESTIMATE                         ********************

            TH 1      TH 2      TH 3      TH 4      TH 5      TH 6      OM11      OM12      OM22      SG11      SG12      SG22
 TH 1
+        1.17E+01
 TH 2
+        2.91E+01  4.32E+02
 TH 3
+       -2.64E-01 -1.18E+00  4.04E-01
 TH 4
+       -1.32E-01  8.37E-01 -2.65E-02  9.75E-02
 TH 5
+       -1.40E-03 -8.21E-03 -4.05E-04  5.50E-04  1.39E-05
 TH 6
+       -1.09E-02 -8.59E-02  1.56E-02 -6.61E-04 -1.52E-05  6.73E-04
 OM11
+        3.59E-03 -1.28E-02  1.05E-03 -1.65E-06 -7.51E-06  4.20E-05  1.22E-04
 OM12
+       ......... ......... ......... ......... ......... ......... ......... .........
 OM22
+        3.75E-03  1.93E-02 -1.12E-03 -4.53E-04 -4.70E-06 -2.97E-05  1.19E-05 .........  7.93E-05
 SG11
+       -7.01E-04 -2.86E-02 -1.58E-03  5.17E-04  7.89E-06 -5.35E-05 -2.21E-05 ......... -6.57E-06  5.40E-05
 SG12
+       ......... ......... ......... ......... ......... ......... ......... ......... ......... ......... .........
 SG22
+       -6.04E-02 -2.19E-01 -5.69E-03  9.64E-03 -2.07E-05  3.10E-05 -2.06E-04 ......... -3.54E-05 -7.24E-05 .........  1.55E-02

 ********************               FIRST ORDER CONDITIONAL ESTIMATION WITH INTERACTION              ********************
 ********************                          CORRELATION MATRIX OF ESTIMATE                        ********************

            TH 1      TH 2      TH 3      TH 4      TH 5      TH 6      OM11      OM12      OM22      SG11      SG12      SG22
 TH 1
+        3.42E+00
 TH 2
+        4.09E-01  2.08E+01
 TH 3
+       -1.21E-01 -8.91E-02  6.36E-01
 TH 4
+       -1.24E-01  1.29E-01 -1.34E-01  3.12E-01
 TH 5
+       -1.10E-01 -1.06E-01 -1.71E-01  4.73E-01  3.73E-03
 TH 6
+       -1.23E-01 -1.59E-01  9.45E-01 -8.16E-02 -1.57E-01  2.60E-02
 OM11
+        9.50E-02 -5.57E-02  1.49E-01 -4.78E-04 -1.82E-01  1.46E-01  1.11E-02
 OM12
+       ......... ......... ......... ......... ......... ......... ......... .........
 OM22
+        1.23E-01  1.05E-01 -1.97E-01 -1.63E-01 -1.42E-01 -1.28E-01  1.21E-01 .........  8.90E-03
 SG11
+       -2.79E-02 -1.87E-01 -3.38E-01  2.25E-01  2.88E-01 -2.81E-01 -2.73E-01 ......... -1.00E-01  7.35E-03
 SG12
+       ......... ......... ......... ......... ......... ......... ......... ......... ......... ......... .........
 SG22
+       -1.42E-01 -8.47E-02 -7.20E-02  2.48E-01 -4.46E-02  9.62E-03 -1.50E-01 ......... -3.20E-02 -7.93E-02 .........  1.24E-01
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
 ********************               FIRST ORDER CONDITIONAL ESTIMATION WITH INTERACTION              ********************
 ********************                      EIGENVALUES OF COR MATRIX OF ESTIMATE                     ********************

             1         2         3         4         5         6         7         8         9        10
         4.16E-02  2.63E-01  5.63E-01  6.91E-01  7.79E-01  1.02E+00  1.14E+00  1.24E+00  1.86E+00  2.40E+00
 Elapsed finaloutput time in seconds:     0.02
 #CPUT: Total CPU Time in Seconds,        3.234
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