Mon 19 Dec 2022 07:12:11 AM PST

$PROBLEM    2 compartment fitting
$INPUT       ID TIME AMT DV WTKG GENDER AGE RATE
$DATA      /home/CertaraUser/Desktop/FDA-OGD-ML/examples/user/Example2/datalarge.csv IGNORE=@

$SUBROUTINE ADVAN4 ;; advan4 ;; ADVAN2, ADVAN4, ADVAN12
$PK
  CWTKGONE = WTKG/70  ;; CENTERED ON ONE
  CWTKGZERO = WTKG-70  ;; CENTERED ON ZERO
  CAGE = AGE/40
  TVV2=THETA(2)  ;; optional covariates effects of WT and Gender
  V2=TVV2*EXP(ETA(2))
  TVCL= THETA(1)    ;; optional covariates effects of WT and AGE
  CL=TVCL*EXP(ETA(1))
  K=CL/V2
  K23=THETA(4)
  K32=THETA(5)         ;; for K23,K32,K24,K42 needed?
  D1=THETA(6)  ; infusion only         ;; include D1 and lag, with diag or block OMEGA

  TVKA=THETA(3)
  KA=TVKA
  S2 	= V2/1000
$ERROR
  REP = IREP
  IPRED =F
  IOBS = F *EXP(EPS(1))+EPS(2)
  Y=IOBS
$THETA  ;; must be one THETA per line.
  (0.001,100)	; THETA(1) CL UNITS =  L/HR
  (0.001,500) 	; THETA(2) V  UNITS = L
  (0.001,2) 	; THETA(3) KA UNITS = 1/HR

  (0.001,0.02)	 ;; THETA(4) K23
  (0.001,0.3) 	 ;; THETA(5) K32
  ;; init for K23~WT   ;; are initial estimates for K23,K32,K24,K42 needed?
  ;;; is initial estimate for Volume a function of weight needed?
  ;;; is initial estimate for Volume a function of gender needed?

  (0.01,0.2) 		;; THETA(6)
$OMEGA   ;; must be one ETA/line
  0.2  		; ETA(1) CLEARANCE
$OMEGA
  0.2 	; ETA(2) VOLUME
  ;; optional $OMEGA blocks
  ;; optional initial estimates for ETA on KA

  ;; optional initial estimates for ETA on D1 and ALAG1

$SIGMA

  0.3 	; EPS(1) proportional error
  0.3 	; EPS(2) additive error   ;; additive or proportional or combined
$EST METHOD=COND INTER MAX = 9999 MSFO=MSF1
$COV UNCOND PRINT=E

;; Phenotype
;; OrderedDict([('ADVAN', 1), ('K23~WT', 0), ('KAETA', 0), ('V2~WT', 0), ('V2~GENDER', 0), ('CL~WT', 0), ('CL~AGE', 0), ('ETAD1LAG', 0), ('D1LAG', 1), ('RESERR', 0)])
;; Genotype
;; [1, 0, 0, 0, 0, 0, 0, 0, 1, 0]
;; Num non-influential tokens = 0

NM-TRAN MESSAGES
 WARNINGS AND ERRORS (IF ANY) FOR PROBLEM    1
 (WARNING  2) NM-TRAN INFERS THAT THE DATA ARE POPULATION.
Note: Analytical 2nd Derivatives are constructed in FSUBS but are never used.
      You may insert $ABBR DERIV2=NO after the first $PROB to save FSUBS construction and compilation time

1NONLINEAR MIXED EFFECTS MODEL PROGRAM (NONMEM) VERSION 7.5.1
 ORIGINALLY DEVELOPED BY STUART BEAL, LEWIS SHEINER, AND ALISON BOECKMANN
 CURRENT DEVELOPERS ARE ROBERT BAUER, ICON DEVELOPMENT SOLUTIONS,
 AND ALISON BOECKMANN. IMPLEMENTATION, EFFICIENCY, AND STANDARDIZATION
 PERFORMED BY NOUS INFOSYSTEMS.
 PROBLEM NO.:         1
 2 compartment fitting
 TOT. NO. OF OBS RECS:      450
 TOT. NO. OF INDIVIDUALS:       50
 TWO COMPARTMENT MODEL WITH FIRST-ORDER ABSORPTION (ADVAN4)
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 #TBLN:      1
 #METH: First Order Conditional Estimation with Interaction
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
 #TERM:
0MINIMIZATION SUCCESSFUL
 NO. OF FUNCTION EVALUATIONS USED:      384
 NO. OF SIG. DIGITS IN FINAL EST.:  3.1

 ETABAR IS THE ARITHMETIC MEAN OF THE ETA-ESTIMATES,
 AND THE P-VALUE IS GIVEN FOR THE NULL HYPOTHESIS THAT THE TRUE MEAN IS 0.

 ETABAR:        -7.3454E-04 -1.8711E-03
 SE:             2.9577E-02  2.9682E-02
 N:                      50          50

 P VAL.:         9.8019E-01  9.4974E-01

 ETASHRINKSD(%)  7.3234E+00  1.1758E+01
 ETASHRINKVR(%)  1.4110E+01  2.2134E+01
 EBVSHRINKSD(%)  7.2207E+00  1.1127E+01
 EBVSHRINKVR(%)  1.3920E+01  2.1015E+01
 RELATIVEINF(%)  8.3363E+01  7.6492E+01
 EPSSHRINKSD(%)  8.0513E+00  8.0513E+00
 EPSSHRINKVR(%)  1.5454E+01  1.5454E+01


 TOTAL DATA POINTS NORMALLY DISTRIBUTED (N):          450
 N*LOG(2PI) CONSTANT TO OBJECTIVE FUNCTION:    827.04467988420538
 OBJECTIVE FUNCTION VALUE WITHOUT CONSTANT:    4718.1634674974721
 OBJECTIVE FUNCTION VALUE WITH CONSTANT:       5545.2081473816779
 REPORTED OBJECTIVE FUNCTION DOES NOT CONTAIN CONSTANT

 TOTAL EFFECTIVE ETAS (NIND*NETA):                           100


 #TERE:
 Elapsed estimation  time in seconds:     3.54
 Elapsed covariance  time in seconds:     3.09
 Elapsed postprocess time in seconds:     0.00

 ********************               FIRST ORDER CONDITIONAL ESTIMATION WITH INTERACTION              ********************
 #OBJT:**************                       MINIMUM VALUE OF OBJECTIVE FUNCTION                      ********************
 #OBJV:********************************************     4718.163       **************************************************

 ********************               FIRST ORDER CONDITIONAL ESTIMATION WITH INTERACTION              ********************
 ********************                             FINAL PARAMETER ESTIMATE                           ********************

 THETA - VECTOR OF FIXED EFFECTS PARAMETERS   *********
         TH 1      TH 2      TH 3      TH 4      TH 5      TH 6
         9.82E+01  4.85E+02  2.26E+00  2.64E-02  2.89E-01  5.87E-01

 OMEGA - COV MATRIX FOR RANDOM EFFECTS - ETAS  ********
         ETA1      ETA2
 ETA1
+        5.09E-02
 ETA2
+        0.00E+00  5.66E-02

 SIGMA - COV MATRIX FOR RANDOM EFFECTS - EPSILONS  ****
         EPS1      EPS2
 EPS1
+        9.54E-02
 EPS2
+        0.00E+00  1.01E-01

 OMEGA - CORR MATRIX FOR RANDOM EFFECTS - ETAS  *******
         ETA1      ETA2
 ETA1
+        2.26E-01
 ETA2
+        0.00E+00  2.38E-01

 SIGMA - CORR MATRIX FOR RANDOM EFFECTS - EPSILONS  ***
         EPS1      EPS2
 EPS1
+        3.09E-01
 EPS2
+        0.00E+00  3.18E-01

 ********************               FIRST ORDER CONDITIONAL ESTIMATION WITH INTERACTION              ********************
 ********************                            STANDARD ERROR OF ESTIMATE                          ********************

 THETA - VECTOR OF FIXED EFFECTS PARAMETERS   *********
         TH 1      TH 2      TH 3      TH 4      TH 5      TH 6
         3.61E+00  4.02E+01  5.58E-01  2.02E-02  8.03E-02  7.92E-02

 OMEGA - COV MATRIX FOR RANDOM EFFECTS - ETAS  ********
         ETA1      ETA2
 ETA1
+        1.11E-02
 ETA2
+       .........  1.25E-02

 SIGMA - COV MATRIX FOR RANDOM EFFECTS - EPSILONS  ****
         EPS1      EPS2
 EPS1
+        6.80E-03
 EPS2
+       .........  1.21E-01

 OMEGA - CORR MATRIX FOR RANDOM EFFECTS - ETAS  *******
         ETA1      ETA2
 ETA1
+        2.47E-02
 ETA2
+       .........  2.63E-02

 SIGMA - CORR MATRIX FOR RANDOM EFFECTS - EPSILONS  ***
         EPS1      EPS2
 EPS1
+        1.10E-02
 EPS2
+       .........  1.90E-01

 ********************               FIRST ORDER CONDITIONAL ESTIMATION WITH INTERACTION              ********************
 ********************                          COVARIANCE MATRIX OF ESTIMATE                         ********************

            TH 1      TH 2      TH 3      TH 4      TH 5      TH 6      OM11      OM12      OM22      SG11      SG12      SG22
 TH 1
+        1.30E+01
 TH 2
+        4.97E+01  1.62E+03
 TH 3
+       -9.93E-03  1.40E+01  3.11E-01
 TH 4
+       -2.06E-03 -6.00E-01 -6.72E-03  4.10E-04
 TH 5
+        3.01E-02 -1.49E+00 -1.49E-02  1.47E-03  6.44E-03
 TH 6
+       -1.93E-02  1.08E+00  3.95E-02 -6.13E-04 -1.36E-03  6.27E-03
 OM11
+        8.13E-04 -2.38E-02  3.51E-04 -2.59E-06 -8.79E-07  6.02E-05  1.24E-04
 OM12
+       ......... ......... ......... ......... ......... ......... ......... .........
 OM22
+        1.32E-03 -5.62E-02 -2.27E-03  1.28E-05 -9.91E-05 -2.28E-04  2.06E-05 .........  1.56E-04
 SG11
+        1.52E-03 -5.23E-02 -1.42E-03  2.76E-05  7.88E-05 -1.81E-04 -1.32E-05 ......... -7.02E-07  4.62E-05
 SG12
+       ......... ......... ......... ......... ......... ......... ......... ......... ......... ......... .........
 SG22
+       -1.24E-01 -1.24E+00 -8.64E-03  2.66E-04 -7.33E-04  1.93E-04 -4.81E-04 ......... -2.63E-05  4.71E-05 .........  1.46E-02

 ********************               FIRST ORDER CONDITIONAL ESTIMATION WITH INTERACTION              ********************
 ********************                          CORRELATION MATRIX OF ESTIMATE                        ********************

            TH 1      TH 2      TH 3      TH 4      TH 5      TH 6      OM11      OM12      OM22      SG11      SG12      SG22
 TH 1
+        3.61E+00
 TH 2
+        3.43E-01  4.02E+01
 TH 3
+       -4.94E-03  6.25E-01  5.58E-01
 TH 4
+       -2.82E-02 -7.38E-01 -5.95E-01  2.02E-02
 TH 5
+        1.04E-01 -4.60E-01 -3.33E-01  9.03E-01  8.03E-02
 TH 6
+       -6.78E-02  3.40E-01  8.95E-01 -3.82E-01 -2.14E-01  7.92E-02
 OM11
+        2.02E-02 -5.31E-02  5.64E-02 -1.15E-02 -9.83E-04  6.82E-02  1.11E-02
 OM12
+       ......... ......... ......... ......... ......... ......... ......... .........
 OM22
+        2.94E-02 -1.12E-01 -3.26E-01  5.08E-02 -9.89E-02 -2.31E-01  1.48E-01 .........  1.25E-02
 SG11
+        6.20E-02 -1.91E-01 -3.75E-01  2.01E-01  1.45E-01 -3.36E-01 -1.74E-01 ......... -8.27E-03  6.80E-03
 SG12
+       ......... ......... ......... ......... ......... ......... ......... ......... ......... ......... .........
 SG22
+       -2.83E-01 -2.55E-01 -1.28E-01  1.09E-01 -7.55E-02  2.02E-02 -3.57E-01 ......... -1.74E-02  5.73E-02 .........  1.21E-01
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
 ********************               FIRST ORDER CONDITIONAL ESTIMATION WITH INTERACTION              ********************
 ********************                      EIGENVALUES OF COR MATRIX OF ESTIMATE                     ********************

             1         2         3         4         5         6         7         8         9        10
         1.52E-02  3.55E-02  2.91E-01  5.35E-01  6.41E-01  8.19E-01  1.26E+00  1.43E+00  1.56E+00  3.41E+00
 Elapsed finaloutput time in seconds:     0.01
 #CPUT: Total CPU Time in Seconds,        6.480
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