Tue 20 Dec 2022 05:15:20 AM PST
$PROBLEM ORAL BOLUS WITH PLASMA AND URINE OBSERVATIONS
  ;
  ; NUMBER OF COMPARTMENTS        : 1 OR 2 OR 3
  ;
  ; ABSORPTION                    : ZERO-ORDER OR FIRST-ORDER OR ZERO-ORDER FOLLOWED BY FIRST-ORDER
  ;
  ; ELIMINATION                   : FIRST-ORDER OR MICHAELIS-MENTEN
  ;
  ; BIOAVAILABLITY                : EITHER 1 OR BETWEEN 0 AND 1 (ASSOCIATED IIV IS ALSO SEARCHED)
  ;
  ; RESIDUAL ERROR FOR PLASMA OBS : PROPORTIONAL OR COMBINED
  ; RESIDUAL ERROR FOR URINE OBS  : ADDITIVE OR PROPORTIONAL OR COMBINED

  ; ====================================================================================================
  ; DATA
  ; ====================================================================================================

$INPUT       ID TIME AMT CMT DROP DV DVID EVID MDV
$DATA      /home/CertaraUser/Desktop/FDA-OGD-ML/examples/user/Example3/OralBolus_PlasmaUrine_ResetCpt4.csv IGNORE=@

  ; ====================================================================================================
  ; SUBROUTINE
  ; ====================================================================================================
$SUBROUTINE ADVAN13 TOL = 6

$MODEL
  NCOMP =  4
  COMP = (DEPOT)
  COMP = (CENTRAL)
  COMP = (PERIPH)
  COMP = (URINE)

  ; ===================================================================================================
  ; STRUCTURAL PARAMETERS
  ; ===================================================================================================
$PK

  KA = THETA(1) * EXP(ETA(1))

  VC = THETA(2) * EXP(ETA(2))

  VP = THETA(3) * EXP(ETA(3))

  CLQ = THETA(4) * EXP(ETA(4))

  CLC = THETA(5) * EXP(ETA(5))

  TEMP = EXP(THETA(6) + ETA(6))
  F1 = TEMP/(1 + TEMP)

  ; ====================================================================================================
  ; INITIAL VALUES FOR FIXED EFFECTS
  ; ====================================================================================================
$THETA

  (0, 1) 	 ; THETA(1) TVKA
  (0, 5) 	 ; THETA(2) TVVC
  (0, 5) 	 ; THETA(3) TVVP
  (0, 1) 	 ; THETA(4) TVCLQ
  (0, 2) 	 ; THETA(5) TVCLC
  3 	 ; THETA(6) TVLOGITF

  ; ====================================================================================================
  ; INITIAL VALUES FOR OMEGA
  ; ====================================================================================================
$OMEGA

  1 	 ; ETA(1) ETA ON KA
  1 	 ; ETA(2) ETA ON VC
  1 	 ; ETA(3) ETA ON VP
  1 	 ; ETA(4) ETA ON CLQ
  1 	 ; ETA(5) ETA ON CLC
  1 	 ; ETA(6) ETA ON LOGITF

  ; ====================================================================================================
  ; ODE MODEL
  ; ====================================================================================================
$DES

  C = A(2)/VC

  DADT(1) = - KA * A(1)
  DADT(2) = KA * A(1) - CLC * C - CLQ * (A(2)/VC - A(3)/VP)
  DADT(3) = CLQ * (A(2)/VC - A(3)/VP)
  DADT(4) = CLC * C

  ; ===================================================================================================
  ; RESIDUAL ERROR MODEL
  ; ===================================================================================================
$ERROR

  ; IPRED
  IPREDC = A(2)/VC
  IPREDU = A(4)

  ; RESIDUAL ERROR MODEL
  IF (DVID == 1) Y = IPREDC * (1 + EPS(1))
  IF (DVID == 2) Y = IPREDU * (1 + EPS(2)) + EPS(3)

$SIGMA

  0.01 	 ; EPS(1) VARIANCE OF PROPORTIONAL ERROR FOR PLASMA OBSERVATION
  0.01 	 ; EPS(2)) VARIANCE OF PROPORTIONAL ERROR FOR URINE OBSERVATIONS
  0.1 	 ; EPS(3) VARIANCE OF ADDITIVE ERROR FOR URINE OBSERVATIONS

  ; ==================================================================================================
  ; ESTIMATION METHOD AND SE
  ; ==================================================================================================

$EST METHOD = 0 NOABORT MAX = 9999 SIGL = 6 NSIG = 2 PRINT = 5

$COV UNCOND PRINT = E

;; Phenotype
;; OrderedDict([('ODE', 4), ('ELIM', 0), ('BIOAVAIL', 2), ('RESERRC', 0), ('RESERRU', 2)])
;; Genotype
;; [4, 0, 2, 0, 2]
;; Num non-influential tokens = 0

NM-TRAN MESSAGES
 WARNINGS AND ERRORS (IF ANY) FOR PROBLEM    1
 (WARNING  2) NM-TRAN INFERS THAT THE DATA ARE POPULATION.
 (WARNING  3) THERE MAY BE AN ERROR IN THE ABBREVIATED CODE. THE FOLLOWING
 ONE OR MORE RANDOM VARIABLES ARE DEFINED WITH "IF" STATEMENTS THAT DO NOT
 PROVIDE DEFINITIONS FOR BOTH THE "THEN" AND "ELSE" CASES. IF ALL
 CONDITIONS FAIL, THE VALUES OF THESE VARIABLES WILL BE ZERO.
   Y
Note: Analytical 2nd Derivatives are constructed in FSUBS but are never used.
      You may insert $ABBR DERIV2=NO after the first $PROB to save FSUBS construction and compilation time

1NONLINEAR MIXED EFFECTS MODEL PROGRAM (NONMEM) VERSION 7.5.1
 ORIGINALLY DEVELOPED BY STUART BEAL, LEWIS SHEINER, AND ALISON BOECKMANN
 CURRENT DEVELOPERS ARE ROBERT BAUER, ICON DEVELOPMENT SOLUTIONS,
 AND ALISON BOECKMANN. IMPLEMENTATION, EFFICIENCY, AND STANDARDIZATION
 PERFORMED BY NOUS INFOSYSTEMS.
 PROBLEM NO.:         1
 ORAL BOLUS WITH PLASMA AND URINE OBSERVATIONS
 TOT. NO. OF OBS RECS:     1300
 TOT. NO. OF INDIVIDUALS:      100
 GENERAL NONLINEAR KINETICS MODEL WITH STIFF/NONSTIFF EQUATIONS (LSODA, ADVAN13)
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 #TBLN:      1
 #METH: First Order
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
 #TERM:
0MINIMIZATION SUCCESSFUL
 NO. OF FUNCTION EVALUATIONS USED:      629
 NO. OF SIG. DIGITS IN FINAL EST.:  2.7

 TOTAL DATA POINTS NORMALLY DISTRIBUTED (N):         1300
 N*LOG(2PI) CONSTANT TO OBJECTIVE FUNCTION:    2389.2401863321488
 OBJECTIVE FUNCTION VALUE WITHOUT CONSTANT:    2464.6015554492310
 OBJECTIVE FUNCTION VALUE WITH CONSTANT:       4853.8417417813798
 REPORTED OBJECTIVE FUNCTION DOES NOT CONTAIN CONSTANT

 TOTAL EFFECTIVE ETAS (NIND*NETA):                           600


 #TERE:
 Elapsed estimation  time in seconds:    39.63
 Elapsed covariance  time in seconds:    17.61
 Elapsed postprocess time in seconds:     0.00

 ********************                                   FIRST ORDER                                  ********************
 #OBJT:**************                       MINIMUM VALUE OF OBJECTIVE FUNCTION                      ********************
 #OBJV:********************************************     2464.602       **************************************************

 ********************                                   FIRST ORDER                                  ********************
 ********************                             FINAL PARAMETER ESTIMATE                           ********************

 THETA - VECTOR OF FIXED EFFECTS PARAMETERS   *********
         TH 1      TH 2      TH 3      TH 4      TH 5      TH 6
         1.11E+00  5.68E+00  3.41E+00  5.80E-01  1.12E+00  3.66E+00

 OMEGA - COV MATRIX FOR RANDOM EFFECTS - ETAS  ********
         ETA1      ETA2      ETA3      ETA4      ETA5      ETA6
 ETA1
+        1.28E-01
 ETA2
+        0.00E+00  8.35E-02
 ETA3
+        0.00E+00  0.00E+00  1.66E-01
 ETA4
+        0.00E+00  0.00E+00  0.00E+00  5.71E-02
 ETA5
+        0.00E+00  0.00E+00  0.00E+00  0.00E+00  8.59E-02
 ETA6
+        0.00E+00  0.00E+00  0.00E+00  0.00E+00  0.00E+00  7.09E+00

 SIGMA - COV MATRIX FOR RANDOM EFFECTS - EPSILONS  ****
         EPS1      EPS2      EPS3
 EPS1
+        1.58E-02
 EPS2
+        0.00E+00  6.08E-02
 EPS3
+        0.00E+00  0.00E+00  5.27E-01

 OMEGA - CORR MATRIX FOR RANDOM EFFECTS - ETAS  *******
         ETA1      ETA2      ETA3      ETA4      ETA5      ETA6
 ETA1
+        3.58E-01
 ETA2
+        0.00E+00  2.89E-01
 ETA3
+        0.00E+00  0.00E+00  4.07E-01
 ETA4
+        0.00E+00  0.00E+00  0.00E+00  2.39E-01
 ETA5
+        0.00E+00  0.00E+00  0.00E+00  0.00E+00  2.93E-01
 ETA6
+        0.00E+00  0.00E+00  0.00E+00  0.00E+00  0.00E+00  2.66E+00

 SIGMA - CORR MATRIX FOR RANDOM EFFECTS - EPSILONS  ***
         EPS1      EPS2      EPS3
 EPS1
+        1.26E-01
 EPS2
+        0.00E+00  2.47E-01
 EPS3
+        0.00E+00  0.00E+00  7.26E-01

 ********************                                   FIRST ORDER                                  ********************
 ********************                            STANDARD ERROR OF ESTIMATE                          ********************

 THETA - VECTOR OF FIXED EFFECTS PARAMETERS   *********
         TH 1      TH 2      TH 3      TH 4      TH 5      TH 6
         6.21E-02  2.41E-01  1.71E-01  3.50E-02  3.40E-02  6.16E-01

 OMEGA - COV MATRIX FOR RANDOM EFFECTS - ETAS  ********
         ETA1      ETA2      ETA3      ETA4      ETA5      ETA6
 ETA1
+        3.04E-02
 ETA2
+       .........  1.63E-02
 ETA3
+       ......... .........  3.96E-02
 ETA4
+       ......... ......... .........  5.83E-02
 ETA5
+       ......... ......... ......... .........  1.28E-02
 ETA6
+       ......... ......... ......... ......... .........  9.21E+00

 SIGMA - COV MATRIX FOR RANDOM EFFECTS - EPSILONS  ****
         EPS1      EPS2      EPS3
 EPS1
+        9.03E-04
 EPS2
+       .........  6.69E-03
 EPS3
+       ......... .........  4.47E-01

 OMEGA - CORR MATRIX FOR RANDOM EFFECTS - ETAS  *******
         ETA1      ETA2      ETA3      ETA4      ETA5      ETA6
 ETA1
+        4.25E-02
 ETA2
+       .........  2.82E-02
 ETA3
+       ......... .........  4.86E-02
 ETA4
+       ......... ......... .........  1.22E-01
 ETA5
+       ......... ......... ......... .........  2.18E-02
 ETA6
+       ......... ......... ......... ......... .........  1.73E+00

 SIGMA - CORR MATRIX FOR RANDOM EFFECTS - EPSILONS  ***
         EPS1      EPS2      EPS3
 EPS1
+        3.59E-03
 EPS2
+       .........  1.36E-02
 EPS3
+       ......... .........  3.08E-01
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
 ********************                                   FIRST ORDER                                  ********************
 ********************                      EIGENVALUES OF COR MATRIX OF ESTIMATE                     ********************

             1         2         3         4         5         6         7         8         9        10        11        12
             13        14        15
         7.55E-02  1.71E-01  2.65E-01  3.41E-01  4.30E-01  4.39E-01  5.86E-01  7.02E-01  7.24E-01  9.41E-01  1.30E+00  1.38E+00
          1.82E+00  2.58E+00  3.25E+00
 Elapsed finaloutput time in seconds:     0.02
 #CPUT: Total CPU Time in Seconds,       56.579
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