Thu 08/04/2022
12:11 AM
$PROBLEM    2 compartment fitting
$INPUT       ID TIME AMT DROP DV MDV EVID WT AGE SEX BUN SCR OCC CRCL COV1 COV2

$DATA      C:\workspace\ffe\user\Example6/dmag_with_period.csv IGNORE=@

$SUBROUTINE ADVAN4 ;; advan4
$PK
  CWTKGONE = WT/81  ;; WEIGHT CENTERED ON ONE
  CWTKGZERO = WT-81 ;; WEIGHT CENTERED ON ZERO
  CAGE = AGE/60     ;; AGE CENTERED ON ONE
  CCRCL = CRCL/85.6 ;; CRCL CENTERD ON ONE
  CCOV1 = COV1-15.4 ;; COVARIATE 1 CENTERED ON ZERO
  IF(OCC.EQ.1) IOVV = ETA(9)
  IF(OCC.EQ.2) IOVV = ETA(10)
  IF(OCC.EQ.3) IOVV = ETA(11)
  TVV2=THETA(1) *EXP(CWTKGZERO*THETA(6)) *EXP(SEX*THETA(7))    *EXP(IOVV)
  V2=TVV2*EXP(ETA(2))
  IF(OCC.EQ.1) IOVCL = ETA(6)
  IF(OCC.EQ.2) IOVCL = ETA(7)
  IF(OCC.EQ.3) IOVCL = ETA(8)
  TVCL= THETA(3)   *CCRCL**THETA(8)  *EXP(IOVCL)
  CL=TVCL*EXP(ETA(1))

  K=CL/V2
  K23=THETA(4)
  K32=THETA(5)
  ALAG1=THETA(9)*EXP(ETA(4))
  ;; No D1
  TVKA=THETA(2)
  KA=TVKA  *EXP(ETA(3))
  S2 = V2
$ERROR
  REP = IREP
  IPRED =F
  IOBS = F *EXP(EPS(1))+EPS(2)
  Y=IOBS
$THETA
  (0.001,100) 	; THETA(1) V  UNITS = L
  (0.001, 10) 	; THETA(2) KA UNITS = 1/HR
  (0.001,2)	; THETA(3) CL UNITS =  L/HR
  (0.001,0.02)  	 ; THETA(4) K23
  (0.001,0.3) 	 ; THETA(5) K32
  ; init for K23~WT
  (-1,0.01) 	; THETA(6) EXPONENTIAL volume ~WT
  (-4,0.1) 	; THETA(7) EXPONENTIAL volume~SEX

  (-4,-0.2) 	; THETA(8) POWER clearance~CRCL

  (0.001,0.1) 	; THETA(9) ALAG1
$OMEGA
  0.1  		; ETA(1) CLEARANCE
  0.4  		; ETA(2) VOLUME
$OMEGA ;; 2nd OMEGA block
  0.1		; ETA(3) ETA ON KA
$OMEGA  ;; diagonal OMEGA
  0.1 		;; ETA(4) ETA ON ALAG1
  0.1 		;; ETA(5) ETA ON D1
$OMEGA BLOCK(1) ; ETA(6)
  0.1
$OMEGA BLOCK SAME ; ETA(7)
$OMEGA BLOCK SAME ; ETA(8)
$OMEGA BLOCK(1) ; ETA(9)
  0.1
$OMEGA BLOCK SAME ; ETA(10)
$OMEGA BLOCK SAME ; ETA(11)
$SIGMA
  0.1 	; EPS(1) proportional error
  100 	; EPS(2) additive error

$EST METHOD=COND INTER MAX = 9999 MSFO=MSF1 PRINT = 10
$COV UNCOND PRINT=E  PRECOND=1 PRECONDS=TOS  MATRIX = R

$TABLE REP ID TIME DV EVID NOPRINT FILE = ORG.DAT ONEHEADER NOAPPEND

$PROB SIMULATION FOR CMAX

$INPUT       ID TIME AMT DROP DV MDV EVID WT AGE SEX BUN SCR OCC CRCL COV1 COV2
$DATA      C:\workspace\ffe\user\Example6/dmag_with_period.csv IGNORE=@  REWIND
$MSFI = MSF1
$SIMULATION (1) ONLYSIM
$TABLE REP ID TIME IOBS EVID  NOAPPEND NOPRINT FILE = SIM.DAT ONEHEADER NOAPPEND

;; Phenotype
;; OrderedDict([('ADVAN', 1), ('K23~WT', 0), ('KAETA', 1), ('V2~WT', 2), ('V2~AGE', 0), ('V2~SEX', 1), ('V2~COV2', 0), ('CL~WT', 0), ('CL~AGE', 0), ('CL~CRCL', 1), ('CL~COV1', 0), ('IOVCL', 0), ('IOVV', 0), ('INITCL', 0), ('ETAD1LAG', 3), ('D1LAG', 0), ('RESERR', 0)])
;; Genotype
;; [1, 0, 1, 2, 0, 1, 0, 0, 0, 1, 0, 0, 0, 0, 3, 0, 0]
;; Num non-influential tokens = 0

NM-TRAN MESSAGES
 WARNINGS AND ERRORS (IF ANY) FOR PROBLEM    1
 (WARNING  2) NM-TRAN INFERS THAT THE DATA ARE POPULATION.
 (WARNING  3) THERE MAY BE AN ERROR IN THE ABBREVIATED CODE. THE FOLLOWING
 ONE OR MORE RANDOM VARIABLES ARE DEFINED WITH "IF" STATEMENTS THAT DO NOT
 PROVIDE DEFINITIONS FOR BOTH THE "THEN" AND "ELSE" CASES. IF ALL
 CONDITIONS FAIL, THE VALUES OF THESE VARIABLES WILL BE ZERO.
   IOVV IOVCL
 (WARNING  31) $OMEGA INCLUDES A NON-FIXED INITIAL ESTIMATE CORRESPONDING TO
 AN ETA THAT IS NOT USED IN ABBREVIATED CODE.
 (WARNING  41) NON-FIXED PARAMETER ESTIMATES CORRESPONDING TO UNUSED
 PARAMETERS MAY CAUSE THE COVARIANCE STEP TO FAIL.
 WARNINGS AND ERRORS (IF ANY) FOR PROBLEM    2
 (WARNING  2) NM-TRAN INFERS THAT THE DATA ARE POPULATION.

1NONLINEAR MIXED EFFECTS MODEL PROGRAM (NONMEM) VERSION 7.4.3
 ORIGINALLY DEVELOPED BY STUART BEAL, LEWIS SHEINER, AND ALISON BOECKMANN
 CURRENT DEVELOPERS ARE ROBERT BAUER, ICON DEVELOPMENT SOLUTIONS,
 AND ALISON BOECKMANN. IMPLEMENTATION, EFFICIENCY, AND STANDARDIZATION
 PERFORMED BY NOUS INFOSYSTEMS.
 PROBLEM NO.:         1
 2 compartment fitting
 TOT. NO. OF OBS RECS:      951
 TOT. NO. OF INDIVIDUALS:       66
 TWO COMPARTMENT MODEL WITH FIRST-ORDER ABSORPTION (ADVAN4)
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 #TBLN:      1
 #METH: First Order Conditional Estimation with Interaction
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
 #TERM:
0MINIMIZATION SUCCESSFUL
 NO. OF FUNCTION EVALUATIONS USED:      906
 NO. OF SIG. DIGITS IN FINAL EST.:  3.1

 ETABAR IS THE ARITHMETIC MEAN OF THE ETA-ESTIMATES,
 AND THE P-VALUE IS GIVEN FOR THE NULL HYPOTHESIS THAT THE TRUE MEAN IS 0.

 ETABAR:         3.2669E-03 -1.0371E-02  2.6706E-02  6.1293E-02  0.0000E+00  4.0482E-02 -1.7415E-02 -2.2245E-02  7.1429E-03  3.7547E-03
                -1.3258E-02
 SE:             4.4866E-02  3.7314E-02  5.1081E-02  3.3256E-02  0.0000E+00  1.4982E-02  1.1219E-02  9.4525E-03  1.0612E-02  2.6617E-03
                 7.0344E-03
 N:                      66          66          66          66          66          66          66          66          66          66
                         66

 P VAL.:         9.4195E-01  7.8105E-01  6.0110E-01  6.5320E-02  1.0000E+00  6.8902E-03  1.2059E-01  1.8605E-02  5.0088E-01  1.5835E-01
                 5.9472E-02

 ETASHRINKSD(%)  8.5817E+00  1.0540E+01  8.0691E+00  1.7225E+01  1.0000E+02  3.9162E+01  5.4443E+01  6.1616E+01  4.6667E+01  8.6623E+01
                 6.4646E+01
 ETASHRINKVR(%)  1.6427E+01  1.9969E+01  1.5487E+01  3.1483E+01  1.0000E+02  6.2988E+01  7.9246E+01  8.5267E+01  7.1556E+01  9.8211E+01
                 8.7501E+01
 EBVSHRINKSD(%)  8.7489E+00  1.1018E+01  1.0442E+01  2.4780E+01  1.0000E+02  4.0411E+01  5.0413E+01  5.9393E+01  4.9851E+01  8.2824E+01
                 6.2188E+01
 EBVSHRINKVR(%)  1.6732E+01  2.0822E+01  1.9794E+01  4.3420E+01  1.0000E+02  6.4491E+01  7.5411E+01  8.3511E+01  7.4851E+01  9.7050E+01
                 8.5703E+01
 EPSSHRINKSD(%)  1.5727E+01  1.5727E+01
 EPSSHRINKVR(%)  2.8980E+01  2.8980E+01


 TOTAL DATA POINTS NORMALLY DISTRIBUTED (N):          951
 N*LOG(2PI) CONSTANT TO OBJECTIVE FUNCTION:    1747.8210901552875
 OBJECTIVE FUNCTION VALUE WITHOUT CONSTANT:    8298.9054946963734
 OBJECTIVE FUNCTION VALUE WITH CONSTANT:       10046.726584851662
 REPORTED OBJECTIVE FUNCTION DOES NOT CONTAIN CONSTANT

 TOTAL EFFECTIVE ETAS (NIND*NETA):                           564


 #TERE:
 Elapsed estimation  time in seconds:    42.58
 TESTING R MATRIX FOR POSITIVE DEFINITNESS
 R MATRIX IS NOT POSITIVE DEFINITE
 PRECONDITIONING CYCLE NO.            1
 Elapsed covariance  time in seconds:    78.16
 Elapsed postprocess time in seconds:     0.09

 ********************               FIRST ORDER CONDITIONAL ESTIMATION WITH INTERACTION              ********************
 #OBJT:**************                       MINIMUM VALUE OF OBJECTIVE FUNCTION                      ********************
 #OBJV:********************************************     8298.905       **************************************************

 ********************               FIRST ORDER CONDITIONAL ESTIMATION WITH INTERACTION              ********************
 ********************                             FINAL PARAMETER ESTIMATE                           ********************

 THETA - VECTOR OF FIXED EFFECTS PARAMETERS   *********
         TH 1      TH 2      TH 3      TH 4      TH 5      TH 6      TH 7      TH 8      TH 9
         2.28E+01  1.52E+00  9.97E+00  2.66E+00  4.02E-01  4.86E-04 -1.11E-01  2.46E-01  2.35E-01

 OMEGA - COV MATRIX FOR RANDOM EFFECTS - ETAS  ********
         ETA1      ETA2      ETA3      ETA4      ETA5      ETA6      ETA7      ETA8      ETA9      ET10      ET11
 ETA1
+        1.61E-01
 ETA2
+        0.00E+00  1.17E-01
 ETA3
+        0.00E+00  0.00E+00  2.07E-01
 ETA4
+        0.00E+00  0.00E+00  0.00E+00  1.08E-01
 ETA5
+        0.00E+00  0.00E+00  0.00E+00  0.00E+00  1.00E-01
 ETA6
+        0.00E+00  0.00E+00  0.00E+00  0.00E+00  0.00E+00  4.06E-02
 ETA7
+        0.00E+00  0.00E+00  0.00E+00  0.00E+00  0.00E+00  0.00E+00  4.06E-02
 ETA8
+        0.00E+00  0.00E+00  0.00E+00  0.00E+00  0.00E+00  0.00E+00  0.00E+00  4.06E-02
 ETA9
+        0.00E+00  0.00E+00  0.00E+00  0.00E+00  0.00E+00  0.00E+00  0.00E+00  0.00E+00  2.65E-02
 ET10
+        0.00E+00  0.00E+00  0.00E+00  0.00E+00  0.00E+00  0.00E+00  0.00E+00  0.00E+00  0.00E+00  2.65E-02
 ET11
+        0.00E+00  0.00E+00  0.00E+00  0.00E+00  0.00E+00  0.00E+00  0.00E+00  0.00E+00  0.00E+00  0.00E+00  2.65E-02

 SIGMA - COV MATRIX FOR RANDOM EFFECTS - EPSILONS  ****
         EPS1      EPS2
 EPS1
+        2.68E-02
 EPS2
+        0.00E+00  1.22E+01

 OMEGA - CORR MATRIX FOR RANDOM EFFECTS - ETAS  *******
         ETA1      ETA2      ETA3      ETA4      ETA5      ETA6      ETA7      ETA8      ETA9      ET10      ET11
 ETA1
+        4.02E-01
 ETA2
+        0.00E+00  3.41E-01
 ETA3
+        0.00E+00  0.00E+00  4.55E-01
 ETA4
+        0.00E+00  0.00E+00  0.00E+00  3.29E-01
 ETA5
+        0.00E+00  0.00E+00  0.00E+00  0.00E+00  3.16E-01
 ETA6
+        0.00E+00  0.00E+00  0.00E+00  0.00E+00  0.00E+00  2.02E-01
 ETA7
+        0.00E+00  0.00E+00  0.00E+00  0.00E+00  0.00E+00  0.00E+00  2.02E-01
 ETA8
+        0.00E+00  0.00E+00  0.00E+00  0.00E+00  0.00E+00  0.00E+00  0.00E+00  2.02E-01
 ETA9
+        0.00E+00  0.00E+00  0.00E+00  0.00E+00  0.00E+00  0.00E+00  0.00E+00  0.00E+00  1.63E-01
 ET10
+        0.00E+00  0.00E+00  0.00E+00  0.00E+00  0.00E+00  0.00E+00  0.00E+00  0.00E+00  0.00E+00  1.63E-01
 ET11
+        0.00E+00  0.00E+00  0.00E+00  0.00E+00  0.00E+00  0.00E+00  0.00E+00  0.00E+00  0.00E+00  0.00E+00  1.63E-01

 SIGMA - CORR MATRIX FOR RANDOM EFFECTS - EPSILONS  ***
         EPS1      EPS2
 EPS1
+        1.64E-01
 EPS2
+        0.00E+00  3.49E+00

 ********************               FIRST ORDER CONDITIONAL ESTIMATION WITH INTERACTION              ********************
 ********************                            STANDARD ERROR OF ESTIMATE                          ********************

 THETA - VECTOR OF FIXED EFFECTS PARAMETERS   *********
         TH 1      TH 2      TH 3      TH 4      TH 5      TH 6      TH 7      TH 8      TH 9
         3.87E+00  2.19E-01  5.45E-01  4.14E-01  2.10E-02  2.68E-03  1.08E-01  1.43E-01  1.89E-02

 OMEGA - COV MATRIX FOR RANDOM EFFECTS - ETAS  ********
         ETA1      ETA2      ETA3      ETA4      ETA5      ETA6      ETA7      ETA8      ETA9      ET10      ET11
 ETA1
+        2.13E-01
 ETA2
+       .........  4.03E-02
 ETA3
+       ......... .........  3.35E-01
 ETA4
+       ......... ......... .........  2.66E-01
 ETA5
+       ......... ......... ......... .........  1.23E+15
 ETA6
+       ......... ......... ......... ......... .........  2.34E-02
 ETA7
+       ......... ......... ......... ......... ......... ......... .........
 ETA8
+       ......... ......... ......... ......... ......... ......... ......... .........
 ETA9
+       ......... ......... ......... ......... ......... ......... ......... .........  9.70E-03
 ET10
+       ......... ......... ......... ......... ......... ......... ......... ......... ......... .........
 ET11
+       ......... ......... ......... ......... ......... ......... ......... ......... ......... ......... .........

 SIGMA - COV MATRIX FOR RANDOM EFFECTS - EPSILONS  ****
         EPS1      EPS2
 EPS1
+        1.83E-03
 EPS2
+       .........  4.43E+00

 OMEGA - CORR MATRIX FOR RANDOM EFFECTS - ETAS  *******
         ETA1      ETA2      ETA3      ETA4      ETA5      ETA6      ETA7      ETA8      ETA9      ET10      ET11
 ETA1
+        2.65E-01
 ETA2
+       .........  5.91E-02
 ETA3
+       ......... .........  3.68E-01
 ETA4
+       ......... ......... .........  4.04E-01
 ETA5
+       ......... ......... ......... .........  1.51E+30
 ETA6
+       ......... ......... ......... ......... .........  5.80E-02
 ETA7
+       ......... ......... ......... ......... ......... ......... .........
 ETA8
+       ......... ......... ......... ......... ......... ......... ......... .........
 ETA9
+       ......... ......... ......... ......... ......... ......... ......... .........  2.98E-02
 ET10
+       ......... ......... ......... ......... ......... ......... ......... ......... ......... .........
 ET11
+       ......... ......... ......... ......... ......... ......... ......... ......... ......... ......... .........

 SIGMA - CORR MATRIX FOR RANDOM EFFECTS - EPSILONS  ***
         EPS1      EPS2
 EPS1
+        5.59E-03
 EPS2
+       .........  6.35E-01
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
 ********************               FIRST ORDER CONDITIONAL ESTIMATION WITH INTERACTION              ********************
 ********************                      EIGENVALUES OF COR MATRIX OF ESTIMATE                     ********************

             1         2         3         4         5         6         7         8         9        10        11        12
             13        14        15        16        17        18
         4.07E-03  1.23E-02  2.32E-02  3.95E-02  1.42E-01  1.88E-01  2.50E-01  3.40E-01  5.68E-01  6.94E-01  9.49E-01  1.00E+00
          1.04E+00  1.09E+00  1.38E+00  1.42E+00  1.60E+00  7.26E+00
 Elapsed finaloutput time in seconds:     0.41

 PROBLEM NO.:         2
 SIMULATION FOR CMAX
 TOT. NO. OF OBS RECS:      951
 TOT. NO. OF INDIVIDUALS:       66
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 SIMULATION STEP PERFORMED
 Elapsed simulation  time in seconds:     0.02
 Elapsed finaloutput time in seconds:     0.08
 #CPUT: Total CPU Time in Seconds,      105.313
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