Wed 01/04/2023
10:49 AM

$PROBLEM    2 compartment fitting
$INPUT       ID TIME AMT DV WTKG GENDER AGE DROP
$DATA      C:\Workspace\Example7/dataExample1.csv IGNORE=@

$SUBROUTINE ADVAN4
$ABBR DERIV2=NO
$PK
  CWTKG = WTKG/70  ;; CENTERED ON ONE
  CAGE = AGE/40
  TVV2=THETA(2)
  V2=TVV2*EXP(ETA(4))
  TVCL= THETA(1)
  CL=TVCL*EXP(ETA(3))
  K=CL/V2
  TVKA=THETA(3)
  KA=TVKA
  S2 	= V2/1000
  ALAG1 = THETA(6)
  K23=THETA(4)*EXP(ETA(1))
  K32 = THETA(5)*EXP(ETA(2))
$ERROR
  REP = IREP
  IPRED =F
  IOBS = F*EXP(EPS(1)) + EPS(2)
  Y=IOBS
$THETA  ;; must be one THETA per line.
  (0.001,100)	; THETA(1) CL UNITS =  L/HR
  (0.001,500) 	; THETA(2) V  UNITS = L
  (0.001,2) 	; THETA(3) KA UNITS = 1/HR
  (0,0.1)	; THETA(4) k23
  (0,0.1)	; THETA(5) k32

  (0, 0.1,3) 	; THETA(6) ALAG1

$SIGMA
  0.1
  10

$EST METHOD=COND INTER MAX = 9999 MSFO=MSF1
$COV UNCOND PRINT=E

;; Phenotype
;; OrderedDict([('KAETA', 1), ('ALAG', 0)])
;; Genotype
;; [1, 0, 0, 0, 0]
;; Num non-influential tokens = 0
$OMEGA
  0.6  	 ; ETA(1) K23
  0.5  	; ETA(2) K32
$OMEGA  ;; block omega searched for bands
0.4

$OMEGA  ;; block omega searched for bands
0.3

NM-TRAN MESSAGES
 WARNINGS AND ERRORS (IF ANY) FOR PROBLEM    1
 (WARNING  2) NM-TRAN INFERS THAT THE DATA ARE POPULATION.

1NONLINEAR MIXED EFFECTS MODEL PROGRAM (NONMEM) VERSION 7.4.3
 ORIGINALLY DEVELOPED BY STUART BEAL, LEWIS SHEINER, AND ALISON BOECKMANN
 CURRENT DEVELOPERS ARE ROBERT BAUER, ICON DEVELOPMENT SOLUTIONS,
 AND ALISON BOECKMANN. IMPLEMENTATION, EFFICIENCY, AND STANDARDIZATION
 PERFORMED BY NOUS INFOSYSTEMS.
 PROBLEM NO.:         1
 2 compartment fitting
 TOT. NO. OF OBS RECS:      450
 TOT. NO. OF INDIVIDUALS:       50
 TWO COMPARTMENT MODEL WITH FIRST-ORDER ABSORPTION (ADVAN4)
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 #TBLN:      1
 #METH: First Order Conditional Estimation with Interaction
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
 #TERM:
0MINIMIZATION SUCCESSFUL
 NO. OF FUNCTION EVALUATIONS USED:      549
 NO. OF SIG. DIGITS IN FINAL EST.:  3.2
0PARAMETER ESTIMATE IS NEAR ITS BOUNDARY

 ETABAR IS THE ARITHMETIC MEAN OF THE ETA-ESTIMATES,
 AND THE P-VALUE IS GIVEN FOR THE NULL HYPOTHESIS THAT THE TRUE MEAN IS 0.

 ETABAR:        -5.0841E-06  1.1476E-05 -6.7154E-04 -1.8926E-03
 SE:             6.5619E-06  1.1525E-05  2.9747E-02  2.9539E-02
 N:                      50          50          50          50

 P VAL.:         4.3846E-01  3.1936E-01  9.8199E-01  9.4891E-01

 ETASHRINKSD(%)  9.9395E+01  9.8836E+01  6.3034E+00  1.0909E+01
 ETASHRINKVR(%)  9.9996E+01  9.9986E+01  1.2209E+01  2.0628E+01
 EBVSHRINKSD(%)  9.9284E+01  9.8559E+01  7.1423E+00  1.1184E+01
 EBVSHRINKVR(%)  9.9995E+01  9.9979E+01  1.3774E+01  2.1117E+01
 EPSSHRINKSD(%)  8.0533E+00  8.0533E+00
 EPSSHRINKVR(%)  1.5458E+01  1.5458E+01


 TOTAL DATA POINTS NORMALLY DISTRIBUTED (N):          450
 N*LOG(2PI) CONSTANT TO OBJECTIVE FUNCTION:    827.04467988420538
 OBJECTIVE FUNCTION VALUE WITHOUT CONSTANT:    4718.4927603739334
 OBJECTIVE FUNCTION VALUE WITH CONSTANT:       5545.5374402581383
 REPORTED OBJECTIVE FUNCTION DOES NOT CONTAIN CONSTANT

 TOTAL EFFECTIVE ETAS (NIND*NETA):                           200


 #TERE:
 Elapsed estimation  time in seconds:     7.41
0S MATRIX ALGORITHMICALLY SINGULAR
0S MATRIX IS OUTPUT
0INVERSE COVARIANCE MATRIX SET TO RS*RMAT, WHERE S* IS A PSEUDO INVERSE OF S
 Elapsed covariance  time in seconds:     6.66
 Elapsed postprocess time in seconds:     0.00

 ********************               FIRST ORDER CONDITIONAL ESTIMATION WITH INTERACTION              ********************
 #OBJT:**************                       MINIMUM VALUE OF OBJECTIVE FUNCTION                      ********************
 #OBJV:********************************************     4718.493       **************************************************

 ********************               FIRST ORDER CONDITIONAL ESTIMATION WITH INTERACTION              ********************
 ********************                             FINAL PARAMETER ESTIMATE                           ********************

 THETA - VECTOR OF FIXED EFFECTS PARAMETERS   *********
         TH 1      TH 2      TH 3      TH 4      TH 5      TH 6
         9.87E+01  4.87E+02  2.18E+00  2.71E-02  2.92E-01  3.12E-01

 OMEGA - COV MATRIX FOR RANDOM EFFECTS - ETAS  ********
         ETA1      ETA2      ETA3      ETA4
 ETA1
+        6.00E-05
 ETA2
+        0.00E+00  5.00E-05
 ETA3
+        0.00E+00  0.00E+00  5.14E-02
 ETA4
+        0.00E+00  0.00E+00  0.00E+00  5.61E-02

 SIGMA - COV MATRIX FOR RANDOM EFFECTS - EPSILONS  ****
         EPS1      EPS2
 EPS1
+        9.55E-02
 EPS2
+        0.00E+00  1.01E-01

 OMEGA - CORR MATRIX FOR RANDOM EFFECTS - ETAS  *******
         ETA1      ETA2      ETA3      ETA4
 ETA1
+        7.75E-03
 ETA2
+        0.00E+00  7.07E-03
 ETA3
+        0.00E+00  0.00E+00  2.27E-01
 ETA4
+        0.00E+00  0.00E+00  0.00E+00  2.37E-01

 SIGMA - CORR MATRIX FOR RANDOM EFFECTS - EPSILONS  ***
         EPS1      EPS2
 EPS1
+        3.09E-01
 EPS2
+        0.00E+00  3.17E-01

 ********************               FIRST ORDER CONDITIONAL ESTIMATION WITH INTERACTION              ********************
 ********************                            STANDARD ERROR OF ESTIMATE                          ********************

 THETA - VECTOR OF FIXED EFFECTS PARAMETERS   *********
         TH 1      TH 2      TH 3      TH 4      TH 5      TH 6
         3.63E+00  4.01E+01  4.45E-01  2.03E-02  8.00E-02  3.00E-02

 OMEGA - COV MATRIX FOR RANDOM EFFECTS - ETAS  ********
         ETA1      ETA2      ETA3      ETA4
 ETA1
+        0.00E+00
 ETA2
+       .........  0.00E+00
 ETA3
+       ......... .........  1.13E-02
 ETA4
+       ......... ......... .........  1.24E-02

 SIGMA - COV MATRIX FOR RANDOM EFFECTS - EPSILONS  ****
         EPS1      EPS2
 EPS1
+        6.77E-03
 EPS2
+       .........  1.20E-01

 OMEGA - CORR MATRIX FOR RANDOM EFFECTS - ETAS  *******
         ETA1      ETA2      ETA3      ETA4
 ETA1
+        0.00E+00
 ETA2
+       .........  0.00E+00
 ETA3
+       ......... .........  2.49E-02
 ETA4
+       ......... ......... .........  2.62E-02

 SIGMA - CORR MATRIX FOR RANDOM EFFECTS - EPSILONS  ***
         EPS1      EPS2
 EPS1
+        1.10E-02
 EPS2
+       .........  1.89E-01
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
 ********************               FIRST ORDER CONDITIONAL ESTIMATION WITH INTERACTION              ********************
 ********************                      EIGENVALUES OF COR MATRIX OF ESTIMATE                     ********************

             1         2         3         4         5         6         7         8         9        10        11        12
         1.58E-02  3.88E-02  2.94E-01  5.29E-01  6.22E-01  8.26E-01  1.00E+00  1.00E+00  1.25E+00  1.46E+00  1.56E+00  3.40E+00
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 Elapsed finaloutput time in seconds:     0.07
 #CPUT: Total CPU Time in Seconds,       13.953
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