Mon 19 Dec 2022 06:15:43 AM PST
$PROBLEM EMAX
  ;
  ; CONTINUOUS COVARIATE, BW
  ;	- E0   : NONE, POWER
  ; 	- EMAX : NONE, POWER
  ;
  ; CATEGORICAL COVRIATE, SEX
  ;	- E0   : NONE, EXPONENTIAL
  ; 	- EMAX : NONE, EXPONENTIAL
  ;
  ; CATEGORICAL COVRIATE, RACE
  ;	- E0   : NONE, EXPONENTIAL
  ; 	- EMAX : NONE, EXPONENTIAL
  ;
  ; IIV ON EC50     : NO OR YES
  ;
  ; SIGMOID         : NO OR YES (THE ASSOCIATED IIV IS ALSO SEARCHED)
  ;
  ; RESIDUAL ERROR  : ADDITIVE OR PROPORTIONAL OR COMBINED

  ; ====================================================================================================
  ; DATA
  ; ====================================================================================================

$INPUT ID TIME SEX RACE BW C DV
$DATA /home/CertaraUser/Desktop/FDA-OGD-ML/examples/user/Example8/PDdata.csv IGNORE = @

  ; ====================================================================================================
  ; PRED
  ; ====================================================================================================

$PRED

  ; SCALED BW
  BWONE = BW/70

  ; INDICATOR FOR SEX = 1
  SEXEQ1 = 0
  IF(SEX == 1) SEXEQ1 = 1

  ; INDICATOR FOR RACE = 1
  RACEEQ1 = 0
  IF(RACE == 1) RACEEQ1 = 1

  ; E0
  TVE0 = THETA(1)
  E0 = TVE0 * BWONE**THETA(4) * EXP(THETA(5) * SEXEQ1) * EXP(THETA(6) * RACEEQ1) * EXP(ETA(1))

  ; EMAX
  TVEMAX = THETA(2)
  EMAX = TVEMAX    * EXP(ETA(2))

  ; EC50
  TVEC50 = THETA(3)
  EC50 = TVEC50

  ; NEWLY ADDED STRUCTURAL PARAMETERS

  ; EMAX MODEL
  CGAM = C
  E = E0 + EMAX * CGAM/(EC50 + CGAM)

  ; RESIDUAL ERROR MODEL
  Y = E * (1 + EPS(1))

  ; ====================================================================================================
  ; INITIAL VALUES FOR THETA
  ; ====================================================================================================

$THETA
  (0, 1) ; THETA(1) tvE0
  (0, 1) ; THETA(2) tvEmax
  (0, 100) ; THETA(3) tvEC50

  ; INITIAL VALUES FOR NEWLY ADDED THETA

  1 	 ; THETA(4) BW ON E0
  1 	 ; THETA(5) SEX ON E0
  -1 	 ; THETA(6) RACE ON E0

  ; ====================================================================================================
  ; INITIAL VALUES FOR OMEGA
  ; ====================================================================================================

$OMEGA
  1 ; ETA(1) nE0
  1 ; ETA(2) nEmax

  ; INITIAL VALUES FOR NEWLY ADDED OMEGA

  ; ====================================================================================================
  ; INITIAL VALUES FOR SIGMA
  ; ====================================================================================================

$SIGMA
  0.01 	 ; EPS(1) VARIANCE OF PROPORTIONAL ERROR

  ; ==================================================================================================
  ; ESTIMATION METHOD AND SE
  ; ==================================================================================================

$EST METHOD = CONDITIONAL INTERACTION NOABORT MAXEVAL = 9999 PRINT = 5

$COV UNCOND PRINT = E
;; Phenotype
;; OrderedDict([('E0_BW', 1), ('E0_SEX', 1), ('E0_RACE', 1), ('EMAX_BW', 0), ('EMAX_SEX', 0), ('EMAX_RACE', 0), ('EC50ETA', 0), ('GAM', 0), ('RESERR', 1)])
;; Genotype
;; [1, 1, 1, 0, 0, 0, 0, 0, 0, 0, 1]
;; Num non-influential tokens = 0

NM-TRAN MESSAGES
 WARNINGS AND ERRORS (IF ANY) FOR PROBLEM    1
 (WARNING  2) NM-TRAN INFERS THAT THE DATA ARE POPULATION.
 (WARNING  13) WITH USER-WRITTEN PRED OR $PRED, NM-TRAN CANNOT APPEND THE
 MDV DATA ITEM.
Note: Analytical 2nd Derivatives are constructed in FSUBS but are never used.
      You may insert $ABBR DERIV2=NO after the first $PROB to save FSUBS construction and compilation time

1NONLINEAR MIXED EFFECTS MODEL PROGRAM (NONMEM) VERSION 7.5.1
 ORIGINALLY DEVELOPED BY STUART BEAL, LEWIS SHEINER, AND ALISON BOECKMANN
 CURRENT DEVELOPERS ARE ROBERT BAUER, ICON DEVELOPMENT SOLUTIONS,
 AND ALISON BOECKMANN. IMPLEMENTATION, EFFICIENCY, AND STANDARDIZATION
 PERFORMED BY NOUS INFOSYSTEMS.
 PROBLEM NO.:         1
 EMAX
 TOT. NO. OF OBS RECS:     1500
 TOT. NO. OF INDIVIDUALS:      150
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 #TBLN:      1
 #METH: First Order Conditional Estimation with Interaction
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
 #TERM:
0MINIMIZATION SUCCESSFUL
 NO. OF FUNCTION EVALUATIONS USED:      281
 NO. OF SIG. DIGITS IN FINAL EST.:  3.5

 ETABAR IS THE ARITHMETIC MEAN OF THE ETA-ESTIMATES,
 AND THE P-VALUE IS GIVEN FOR THE NULL HYPOTHESIS THAT THE TRUE MEAN IS 0.

 ETABAR:        -1.0962E-03  3.5961E-03
 SE:             2.2933E-02  1.3097E-02
 N:                     150         150

 P VAL.:         9.6188E-01  7.8365E-01

 ETASHRINKSD(%)  3.0575E+00  4.2080E+01
 ETASHRINKVR(%)  6.0215E+00  6.6453E+01
 EBVSHRINKSD(%)  3.0721E+00  4.2371E+01
 EBVSHRINKVR(%)  6.0498E+00  6.6789E+01
 RELATIVEINF(%)  9.2201E+01  3.2592E+01
 EPSSHRINKSD(%)  6.3355E+00
 EPSSHRINKVR(%)  1.2270E+01


 TOTAL DATA POINTS NORMALLY DISTRIBUTED (N):         1500
 N*LOG(2PI) CONSTANT TO OBJECTIVE FUNCTION:    2756.8155996140181
 OBJECTIVE FUNCTION VALUE WITHOUT CONSTANT:   -2874.9115154645560
 OBJECTIVE FUNCTION VALUE WITH CONSTANT:      -118.09591585053795
 REPORTED OBJECTIVE FUNCTION DOES NOT CONTAIN CONSTANT

 TOTAL EFFECTIVE ETAS (NIND*NETA):                           300


 #TERE:
 Elapsed estimation  time in seconds:     2.26
 Elapsed covariance  time in seconds:     2.63
 Elapsed postprocess time in seconds:     0.00

 ********************               FIRST ORDER CONDITIONAL ESTIMATION WITH INTERACTION              ********************
 #OBJT:**************                       MINIMUM VALUE OF OBJECTIVE FUNCTION                      ********************
 #OBJV:********************************************    -2874.912       **************************************************

 ********************               FIRST ORDER CONDITIONAL ESTIMATION WITH INTERACTION              ********************
 ********************                             FINAL PARAMETER ESTIMATE                           ********************

 THETA - VECTOR OF FIXED EFFECTS PARAMETERS   *********
         TH 1      TH 2      TH 3      TH 4      TH 5      TH 6
         1.62E+00  8.46E-01  1.31E+02  1.42E+00  6.79E-01 -1.85E+00

 OMEGA - COV MATRIX FOR RANDOM EFFECTS - ETAS  ********
         ETA1      ETA2
 ETA1
+        8.39E-02
 ETA2
+        0.00E+00  7.67E-02

 SIGMA - COV MATRIX FOR RANDOM EFFECTS - EPSILONS  ****
         EPS1
 EPS1
+        1.92E-02

 OMEGA - CORR MATRIX FOR RANDOM EFFECTS - ETAS  *******
         ETA1      ETA2
 ETA1
+        2.90E-01
 ETA2
+        0.00E+00  2.77E-01

 SIGMA - CORR MATRIX FOR RANDOM EFFECTS - EPSILONS  ***
         EPS1
 EPS1
+        1.39E-01

 ********************               FIRST ORDER CONDITIONAL ESTIMATION WITH INTERACTION              ********************
 ********************                            STANDARD ERROR OF ESTIMATE                          ********************

 THETA - VECTOR OF FIXED EFFECTS PARAMETERS   *********
         TH 1      TH 2      TH 3      TH 4      TH 5      TH 6
         7.65E-02  4.04E-02  9.56E+00  1.82E-01  5.07E-02  4.99E-02

 OMEGA - COV MATRIX FOR RANDOM EFFECTS - ETAS  ********
         ETA1      ETA2
 ETA1
+        9.43E-03
 ETA2
+       .........  1.73E-02

 SIGMA - COV MATRIX FOR RANDOM EFFECTS - EPSILONS  ****
         EPS1
 EPS1
+        7.16E-04

 OMEGA - CORR MATRIX FOR RANDOM EFFECTS - ETAS  *******
         ETA1      ETA2
 ETA1
+        1.63E-02
 ETA2
+       .........  3.12E-02

 SIGMA - CORR MATRIX FOR RANDOM EFFECTS - EPSILONS  ***
         EPS1
 EPS1
+        2.58E-03

 ********************               FIRST ORDER CONDITIONAL ESTIMATION WITH INTERACTION              ********************
 ********************                          COVARIANCE MATRIX OF ESTIMATE                         ********************

            TH 1      TH 2      TH 3      TH 4      TH 5      TH 6      OM11      OM12      OM22      SG11
 TH 1
+        5.85E-03
 TH 2
+       -1.95E-04  1.63E-03
 TH 3
+        5.29E-04  2.06E-01  9.14E+01
 TH 4
+        3.74E-03  2.41E-04 -1.47E-02  3.31E-02
 TH 5
+       -2.90E-03  1.77E-04  1.80E-02 -2.13E-03  2.57E-03
 TH 6
+       -2.26E-03  1.43E-04  1.35E-02 -7.26E-04  6.07E-04  2.49E-03
 OM11
+        6.35E-05 -3.43E-05 -4.76E-03  3.77E-05 -5.95E-05 -1.04E-05  8.89E-05
 OM12
+       ......... ......... ......... ......... ......... ......... ......... .........
 OM22
+        1.41E-05  3.31E-04  3.93E-02 -2.52E-04 -1.38E-05 -6.43E-05 -2.39E-05 .........  2.99E-04
 SG11
+        6.07E-06 -1.66E-06 -1.89E-04 -1.63E-05 -3.93E-06 -1.51E-06 -3.18E-07 ......... -1.28E-06  5.13E-07

 ********************               FIRST ORDER CONDITIONAL ESTIMATION WITH INTERACTION              ********************
 ********************                          CORRELATION MATRIX OF ESTIMATE                        ********************

            TH 1      TH 2      TH 3      TH 4      TH 5      TH 6      OM11      OM12      OM22      SG11
 TH 1
+        7.65E-02
 TH 2
+       -6.32E-02  4.04E-02
 TH 3
+        7.23E-04  5.33E-01  9.56E+00
 TH 4
+        2.69E-01  3.28E-02 -8.46E-03  1.82E-01
 TH 5
+       -7.48E-01  8.66E-02  3.72E-02 -2.32E-01  5.07E-02
 TH 6
+       -5.93E-01  7.11E-02  2.83E-02 -7.99E-02  2.40E-01  4.99E-02
 OM11
+        8.81E-02 -9.00E-02 -5.28E-02  2.20E-02 -1.25E-01 -2.20E-02  9.43E-03
 OM12
+       ......... ......... ......... ......... ......... ......... ......... .........
 OM22
+        1.07E-02  4.74E-01  2.38E-01 -8.01E-02 -1.57E-02 -7.44E-02 -1.47E-01 .........  1.73E-02
 SG11
+        1.11E-01 -5.72E-02 -2.76E-02 -1.25E-01 -1.08E-01 -4.22E-02 -4.70E-02 ......... -1.03E-01  7.16E-04
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
 ********************               FIRST ORDER CONDITIONAL ESTIMATION WITH INTERACTION              ********************
 ********************                      EIGENVALUES OF COR MATRIX OF ESTIMATE                     ********************

             1         2         3         4         5         6         7         8         9
         1.47E-01  3.70E-01  6.29E-01  7.27E-01  9.20E-01  9.81E-01  1.13E+00  1.85E+00  2.24E+00
 Elapsed finaloutput time in seconds:     0.01
 #CPUT: Total CPU Time in Seconds,        5.039
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